# OpenSim document version 40000
ExternalLoads:
  datafile: C:\Users\movea\Documents\GitHub\Exoskeletons_ExperimentGuidedCalibration\DataExample\Data2392\P1S100W01.mot
  lowpass_cutoff_frequency_for_load_kinematics: 6
  ExternalForce l1: applied_to_body=calcn_l force_expressed_in_body=ground point_expressed_in_body=ground
      force_identifier=ground_force_1_v point_identifier=ground_force_1_p torque_identifier=ground_moment_1_m
  ExternalForce r1: applied_to_body=calcn_r force_expressed_in_body=ground point_expressed_in_body=ground
      force_identifier=ground_force_2_v point_identifier=ground_force_2_p torque_identifier=ground_moment_2_m
  ExternalForce l2: applied_to_body=calcn_l force_expressed_in_body=ground point_expressed_in_body=ground
      force_identifier=ground_force_3_v point_identifier=ground_force_3_p torque_identifier=ground_moment_3_m
