# OpenSim document version 40000
InverseKinematicsTool:
  results_directory: C:\Users\movea\Dropbox\PhDWork\Simulation\subject1\hammer2010\100\IK_GC\inverse_kinematics_1
  model_file: C:\Users\movea\Dropbox\PhDWork\Simulation\subject1\hammer2010\Model\1_scaledH_hammer2010.osim
  constraint_weight: Inf
  accuracy: 1e-5
  time_range: 0.57 1.75
  output_motion_file: C:\Users\movea\Dropbox\PhDWork\Simulation\subject1\hammer2010\100\IK_GC\inverse_kinematics_1\IK_sub1mod2act4GCMOT1.mot
  report_errors: true
  marker_file: C:\Users\movea\Dropbox\PhDWork\ExperimentalData\subject1\100\P1S100W01.trc
  report_marker_locations: true
  IKTaskSet:
    IKMarkerTask RSHO: apply=true weight=10
    IKMarkerTask LSHO: apply=true weight=10
    IKMarkerTask C7: apply=true weight=1
    IKMarkerTask CLAV: apply=true weight=1
    IKMarkerTask RSJC_cgm24: apply=false weight=1
    IKMarkerTask RELB: apply=true weight=5
    IKMarkerTask RMEL: apply=true weight=5
    IKMarkerTask RUPPERARM_cgm24O: apply=false weight=5
    IKMarkerTask RWRA: apply=true weight=5
    IKMarkerTask RWRB: apply=true weight=5
    IKMarkerTask LSJC_cgm24: apply=false weight=1
    IKMarkerTask LELB: apply=true weight=5
    IKMarkerTask LMEL: apply=true weight=5
    IKMarkerTask LUPPERARM_cgm24O: apply=false weight=5
    IKMarkerTask LWRA: apply=true weight=5
    IKMarkerTask LWRB: apply=true weight=5
    IKMarkerTask RASI: apply=true weight=20
    IKMarkerTask LASI: apply=true weight=20
    IKMarkerTask RPSI: apply=true weight=20
    IKMarkerTask LPSI: apply=true weight=20
    IKMarkerTask LHJC_cgm24: apply=false weight=1
    IKMarkerTask RHJC_cgm24: apply=false weight=1
    IKMarkerTask RTHAP: apply=true weight=1
    IKMarkerTask RTHI: apply=true weight=1
    IKMarkerTask RTHAD: apply=true weight=1
    IKMarkerTask RKNE: apply=true weight=20
    IKMarkerTask RKNM: apply=false weight=1
    IKMarkerTask RTIAP: apply=true weight=1
    IKMarkerTask RTIB: apply=true weight=0
    IKMarkerTask RTIAD: apply=true weight=1
    IKMarkerTask RANK: apply=true weight=20
    IKMarkerTask RMED: apply=false weight=1
    IKMarkerTask RHEE: apply=true weight=20
    IKMarkerTask RFMH: apply=true weight=5
    IKMarkerTask RVMH: apply=true weight=5
    IKMarkerTask LTHAP: apply=true weight=1
    IKMarkerTask LTHI: apply=true weight=1
    IKMarkerTask LTHAD: apply=true weight=1
    IKMarkerTask LKNE: apply=true weight=20
    IKMarkerTask LKNM: apply=false weight=1
    IKMarkerTask LTIAP: apply=true weight=1
    IKMarkerTask LTIB: apply=true weight=0
    IKMarkerTask LTIAD: apply=true weight=1
    IKMarkerTask LANK: apply=true weight=20
    IKMarkerTask LMED: apply=false weight=1
    IKMarkerTask LHEE: apply=true weight=20
    IKMarkerTask LFMH: apply=true weight=5
    IKMarkerTask LVMH: apply=true weight=5
