# OpenSim document version 40000
AnalyzeTool 1_scaled_hammer2010_0902_7_H:
  model_file: 1_scaledH_hammer2010_MIF2.osim
  replace_force_set: false
  results_directory: AnalysisBodyQ
  output_precision: 8
  initial_time: 0.57
  final_time: 1.75
  solve_for_equilibrium_for_auxiliary_states: false
  maximum_number_of_integrator_steps: 20000
  maximum_integrator_step_size: 1
  minimum_integrator_step_size: 1e-8
  integrator_error_tolerance: 1e-5
  coordinates_file: IK/IK.mot
  lowpass_cutoff_frequency_for_coordinates: -1
  AnalysisSet Analyses:
    PointKinematics: start_time=0.57 end_time=1.75 step_interval=1 in_degrees=true body_name=ground
        relative_to_body_name=none point_name=RSHO point=(0 0 0)
