# OpenSim document version 40000
AnalyzeTool IK:
  model_file: C:\Users\israe\Documents\GitHub\Exoskeletons_ExperimentGuidedCalibration\DataExample\Model.osim
  replace_force_set: false
  results_directory: C:\Users\israe\Documents\GitHub\Exoskeletons_ExperimentGuidedCalibration\Results_FiberLengths\MuscleAnalysis
  output_precision: 8
  initial_time: 0.57
  final_time: 1.75
  solve_for_equilibrium_for_auxiliary_states: false
  maximum_number_of_integrator_steps: 20000
  maximum_integrator_step_size: 1
  minimum_integrator_step_size: 1e-8
  integrator_error_tolerance: 1e-5
  coordinates_file: C:\Users\israe\Documents\GitHub\Exoskeletons_ExperimentGuidedCalibration\DataExample\IK.mot
  lowpass_cutoff_frequency_for_coordinates: -1
  AnalysisSet Analyses:
    MuscleAnalysis: start_time=0.57 end_time=1.75 step_interval=1 in_degrees=true muscle_list=all
        moment_arm_coordinate_list=(hip_flexion_r hip_adduction_r hip_rotation_r knee_angle_r ankle_angle_r)
        compute_moments=true
